// COMSOL Multiphysics 6.4.0.429 model "RayleighBIC_rounded_180k_eigenfrequency.mph"
// Outline of the model tree

Parameters
  a = 0.00742[m]
  w1 = 0.00441[m]
  d1 = 0.00515[m]
  w2 = 0.001[m]
  d2 = 0.00132[m]
  g12 = 0.001[m]
  g21 = 0.00101[m]
  x1 = g21/2
  x2 = x1+w1+g12
  tPlate = 0.01[m]
  H = 0.025[m]
  tPML = 0.008[m]
  c0 = 1500[m/s]
  rho0 = 1000[kg/m^3]
  f0 = 180000[Hz]
  theta = 7.1[deg]
  lambda0 = c0/f0
  kxB = 2*pi*f0/c0*sin(theta)

Coordinate systems
  pml1: PML "Perfectly Matched Layer 1" on domains 3 | wavelengthSourceType = userDefined; typicalWavelength = lambda0

Geometry
  geom1 "Geometry 1" (2D, length unit m)
    plate: Rectangle | size = {a, tPlate}; pos = {0, -tPlate}
    groove1: Rectangle | size = {w1, d1}; pos = {x1, -d1}
    groove2: Rectangle | size = {w2, d2}; pos = {x2, -d2}
    steel: Difference | input = plate; input2 = groove1, groove2
    waterTop: Rectangle | size = {a, H}
    waterG1: Rectangle "Rectangle 1a" | size = {w1, d1}; pos = {x1, -d1}
    waterG2: Rectangle "Rectangle 2a" | size = {w2, d2}; pos = {x2, -d2}
    fluid: Union | input = waterTop, waterG1, waterG2; intbnd = off; edge = all
    pmlRect: Rectangle | size = {a, tPML}; pos = {0, H}
    all: Union | input = steel, fluid, pmlRect
    fin: Finalize "Form Union"

Materials
  water: Common on domains 2, 3
    def: def "Basic"
      density = rho0
      soundspeed = c0
  steelmat: Common "Stainless steel" on domains 1
    def: def "Basic"
      density = 7850[kg/m^3]
      youngsmodulus = 200[GPa]
      poissonsratio = 0.30

Physics
  acpr: PressureAcoustics "Pressure Acoustics, Frequency Domain" on domains 2, 3
    dependent variable p
    fpam1: FrequencyPressureAcousticsModel "Pressure Acoustics 1" (default)
    shb1: SoundHard "Sound Hard Boundary (Wall) 1" (default)
    init1: init "Initial Values 1" (default)
    pc1: PeriodicCondition on boundaries 3, 5, 17, 18
      PeriodicType = Floquet
      kFloquet = {kxB, 0, 0}
      destinationDomains: boundaries 17, 18

Mesh
  mesh1 "Mesh 1"
    size: MeshSizeDefault | hmax = 0.32[mm]; hmin = 0.025[mm]; hcurve = 0.25; hnarrow = 0.8; hgrad = 1.25; custom = on
    ftri1: FreeTri "Free Triangular 1" on remaining entities

Studies
  std1 "Study 1"
    eig: Eigenfrequency | neigs = 8; shift = f0

Solver configurations
  sol1 "Solution 1" (study std1)
    v1: Variables "Dependent Variables 1"
    e1: Eigenvalue "Eigenvalue Solver 1"
      dDef: Direct

Datasets
  dset1: Solution | solution = sol1

Plots
  pg1: PlotGroup2D "Localized eigenpressure" | data = dset1
    surf1: Surface | expr = real(acpr.p_t)